// COMSOL Multiphysics 5.3.0.223 model "simple_square.mph"
// Outline of the model tree

Functions
  int1: Interpolation | importedname = da_data.csv; source = file; filename = C:\Users\hching\Downloads\qj_data.csv; nargs = 2; argunit = m

Variables
  var1 "Variables 1"
    q_des = 1[W/m^2]+y[W/m^3]

Geometry
  geom1 "Geometry 1" (3D, length unit m)
    blk1: Block | size = {1, 1, .0127}
    fin: Finalize "Form Union"

Materials
  mat1: Common "Silica glass" on all domains
    def "Basic"
      relpermeability = 1
      electricconductivity = 1e-14[S/m]
      thermalexpansioncoefficient = 0.55e-6[1/K]
      heatcapacity = 703[J/(kg*K)]
      relpermittivity = 2.09
      density = 2203[kg/m^3]
      thermalconductivity = 1.38[W/(m*K)]
    Enu "Young's modulus and Poisson's ratio"
      youngsmodulus = 73.1e9[Pa]
      poissonsratio = 0.17
    RefractiveIndex
      n = 1.45
      ki = 0
  mat2: Common "ITO" on boundaries 4
    def "Basic"
      electricconductivity = 1e6
      relpermittivity = 1
      density = 6800
      thermalconductivity = .84
      heatcapacity = .0105

Physics
  ecs: ConductiveMediaShell "Electric Currents, Shell" on boundaries 4
    dependent variable V
    ds.ds = 1e-7
    cucn1: CurrentConservation (default)
    ein1: ElectricInsulation (default)
    init1: init "Initial Values 1" (default)
    pot1: ElectricPotential on edges 8 | V0 = 115
    pot2: ElectricPotential on edges 5 | V0 = -115

Mesh
  mesh1 "Mesh 1"
    size: MeshSizeDefault | hmax = 0.05; custom = on
    ftri1: FreeTri "Free Triangular 1" on boundaries 4

Studies
  std1 "Study 1"
    stat: Stationary

Solver configurations
  sol1 "Solution 1" (study std1)
    v1: Variables "Dependent Variables 1"
    s1: Stationary "Stationary Solver 1"
      dDef: Direct
      fc1: FullyCoupled | linsolver = dDef

Datasets
  dset1: Solution | solution = sol1
  int1_ds1: Grid3D | function = int1; parmax1 = 1; parmin3 = 0.0127; parmax3 = 0.0127
  int1_ds2: Grid3D | function = int1; parmax1 = 1; parmin3 = 0.0127; parmax3 = 0.0127
  int1_ds3: Grid2D | function = int1
  int1_ds4: Grid2D | function = int1
  int1_ds5: Grid2D | function = int1

Plots
  pg1: PlotGroup3D "Electric Potential (ecs)" | data = dset1
    surf1: Surface | expr = V
  pg2: PlotGroup3D "3D Plot Group 2" | data = dset1
    surf2: Surface | expr = int1(x,y)/(ecs.Qsrh/ecs.ds)
  pg3: PlotGroup2D "2D Plot Group 3" | data = none; title = int1(x,y)
    plot1: Surface | data = int1_ds5; expr = comp1.int1(root.x,root.y); descr = int1(x,y)
      height1: Height "Height Expression 1" | expr = comp1.V

Exports
  plot1: Plot | filename = C:\Users\ndraper\Documents\TransparencyModel\da_data.csv
  tbl1: Table